OpenVSP model (file version 4), 9 components.
Geometry view with OpenVSP parameter names; values to 6 digits, angles in degrees, lengths in the model's unit.
Overall bounding box: X_Min=-0.337127 X_Len=32.8867 Y_Min=-14.7143 Y_Len=29.4286 Z_Min=-3.5559 Z_Len=9.73482

Fuselage "FuselageGeom"
  location (X Y Z) 0 0 0, rotation 0 0 0
  bounding box size 31.1553 2.86569 3.73296
  Design: Length=30.8182
  cross sections:
    n  XLocPercent  YLocPercent  ZLocPercent  shape
    0  0            0            -0.0163043   point
    1  0.288043     0            0            rounded rectangle RoundRectXSec_Radius=1.30451 RoundedRect_Height=3.31578 RoundedRect_Width=2.77307
    2  0.5          0            0            rounded rectangle RoundRectXSec_Radius=1.30451 RoundedRect_Height=3.58302 RoundedRect_Width=2.86569
    3  0.75         0            -0.0217391   rounded rectangle RoundRectXSec_Radius=1.25533 RoundedRect_Height=2.51067 RoundedRect_Width=2.54156
    4  0.875        0            -0.0242793   rounded rectangle RoundRectXSec_Radius=0.826703 RoundedRect_Height=2.3864 RoundedRect_Width=1.89857
    5  1            0            -0.0220345   circle Circle_Diameter=1.04262

Pod "PodGeom", child of "FuselageGeom"
  location (X Y Z) 7.85714 0 1.30952, rotation 0 2.14286 0
  bounding box size 11.6585 2.90155 3.07402
  negative volume
  Design: FineRatio=8.04167 Length=11.6667

Wing "Maindeltawing"
  location (X Y Z) 10 0.714286 0.47619, rotation 0 0 0
  symmetric about XZ
  bounding box size 12.765 29.4286 0.359914
  totals: TotalSpan=28 TotalProjectedSpan=28 TotalChord=8.54167 TotalArea=239.167
  root: chord 12.4012, twist 0, NACA 4-series Camber=0 CamberLoc=0.2 ThickChord=0.025
  sections:
    n  Span  Root_Chord  Tip_Chord  Area     Sweep  Sweep_Location  Dihedral  Twist  Twist_Location  tip airfoil
    1  14    12.4012     4.6821     119.583  30     0               0         0      0.25            NACA 4-series Camber=0 CamberLoc=0.2 ThickChord=0.00833333

Wing "Canard", child of "Maindeltawing"
  location (X Y Z) 26.994 0.238095 0.47619, rotation 0 0 0
  symmetric about XZ
  bounding box size 3.48035 11.7219 0.404032
  totals: TotalSpan=11.2457 TotalProjectedSpan=11.2457 TotalChord=2.30781 TotalArea=25.9529
  root: chord 3.48035, twist 0, NACA 4-series Camber=0 CamberLoc=0.2 ThickChord=0.1
  sections:
    n  Span     Root_Chord  Tip_Chord  Area     Sweep  Sweep_Location  Dihedral  Twist  Twist_Location  tip airfoil
    1  5.62284  3.48035     1.13527    12.9765  20     0               0         0      0.25            as above

Wing "Rudder", child of "Maindeltawing"
  location (X Y Z) 25 0 0.47619, rotation 91.25 0 0
  bounding box size 7.54957 0.635077 5.70966
  totals: TotalSpan=5.7 TotalProjectedSpan=5.7 TotalChord=4.35007 TotalArea=24.7954
  root: chord 5.47188, twist 0, NACA 4-series Camber=0 CamberLoc=0.2 ThickChord=0.1
  sections:
    n  Span  Root_Chord  Tip_Chord  Area     Sweep    Sweep_Location  Dihedral  Twist  Twist_Location  tip airfoil
    1  5.7   5.47188     3.22826    24.7954  37.1667  0               0         0      0.25            as above

Duct "Duct"
  location (X Y Z) 11.8155 2.02381 -0.714286, rotation 0 0 0
  symmetric about XZ
  bounding box size 1 5.48438 1.45561
  Design: Camber=0 CamberLoc=0.2 Chord=1 Height=1.20458 InvertFlag=0 Shape=0.116667 ThickChord=0.2 Width=1.20458
  custom script Duct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

Fuselage "intakes", child of "Duct"
  location (X Y Z) 11.8478 2.17391 -0.652174, rotation 0 0 0
  symmetric about XZ
  bounding box size 13.3182 5.0554 1.94426
  Design: Length=13.3182
  cross sections:
    n  XLocPercent  YLocPercent  ZLocPercent  shape
    0  0            -0.0217391   0            circle Circle_Diameter=1.28663
    1  0.25         -0.0538187   0            circle Circle_Diameter=1.63636
    2  0.5          -0.0804584   0            as above
    3  1            -0.153807    -0.0271739   circle Circle_Diameter=1.52834

PodMan "PodMan"
  location (X Y Z) 13.7798 0 2.38095, rotation -180 68.9286 -180
  bounding box size 4.14445 2.12571 3.73935
  Design: ElbowAngle=45 Height=6 HipAngle=90 KneeAngle=-36.4232 PresetTrigger=0 Presets=4 ShoulderAngle=45
  custom script PodMan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

PodMan "Pilot"
  location (X Y Z) 4.28571 -5.47619 2.61905, rotation -180 88.75 -180
  bounding box size 1.59859 2.12571 6.18118
  Design: ElbowAngle=0 Height=6 HipAngle=0 KneeAngle=0 PresetTrigger=0 Presets=0 ShoulderAngle=0
  custom script PodMan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
