OpenVSP model (file version 4), 5 components.
Geometry view with OpenVSP parameter names; values to 6 digits, angles in degrees, lengths in the model's unit.
Overall bounding box: X_Min=0 X_Len=34 Y_Min=-41.96 Y_Len=83.9201 Z_Min=-2.13909 Z_Len=4.93161

Fuselage "Fuselage"
  location (X Y Z) 0 0 0, rotation 0 0 0
  bounding box size 34 3.1 3.1
  Design: Length=34
  cross sections:
    n   XLocPercent  YLocPercent  ZLocPercent  shape
    0   0            0            0            circle Circle_Diameter=0
    1   0.0970414    0            0            circle Circle_Diameter=2
    2   0.194083     0            0            circle Circle_Diameter=3
    3   0.307432     0            0            circle Circle_Diameter=3.1
    4   0.420782     0            0            circle Circle_Diameter=2.7
    5   0.490363     0            0            circle Circle_Diameter=2.3
    6   0.564433     0            0            circle Circle_Diameter=2
    7   0.638503     0            0            circle Circle_Diameter=1.5
    8   0.786643     0            0            circle Circle_Diameter=1
    9   0.893322     0            0            circle Circle_Diameter=0.8
    10  1            0            0            circle Circle_Diameter=0

Wing "Wing", child of "Fuselage"
  location (X Y Z) 12 0 0.5, rotation 0 0 0
  symmetric about XZ
  bounding box size 5.776 83.9201 2.06733
  totals: TotalSpan=84 TotalProjectedSpan=83.9201 TotalChord=2.35244 TotalArea=197.605
  root: chord 3.34326, twist 0, super ellipse Super_Height=0.334326 Super_M=2 Super_N=2 Super_Width=3.34326
  sections:
    n  Span  Root_Chord  Tip_Chord  Area     Sweep  Sweep_Location  Dihedral  Twist  Twist_Location  tip airfoil
    1  42    3.34326     1.36162    98.8026  6      0               2.5       0      0.25            NACA 4-series Camber=0 CamberLoc=0.2 ThickChord=0.1

Duct "Williams FJ44-4", child of "Fuselage"
  location (X Y Z) 20 0 1, rotation 0 0 0
  bounding box size 5.72 3.14445 3.18726
  Design: Camber=0 CamberLoc=0.2 Chord=5.72 Height=2 InvertFlag=0 Shape=0 ThickChord=0.2 Width=2
  custom script Duct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

Duct "Williams FJ33", child of "Williams FJ44-4"
  location (X Y Z) 20 0 1.5, rotation 0 0 0
  bounding box size 4 2.55032 2.58504
  Design: Camber=0 CamberLoc=0.2 Chord=4 Height=1.75 InvertFlag=0 Shape=0 ThickChord=0.2 Width=1.75
  custom script Duct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

Wing "Tail - Horizontal"
  location (X Y Z) 31 0 0, rotation -20 0 0
  symmetric about XZ
  bounding box size 2.55072 11.3396 2.25894
  totals: TotalSpan=12 TotalProjectedSpan=12 TotalChord=2.2 TotalArea=26.4
  root: chord 2.55072, twist 0, rounded rectangle RoundRectXSec_Radius=0.127536 RoundedRect_Height=0.255072 RoundedRect_Width=2.55072
  sections:
    n  Span  Root_Chord  Tip_Chord  Area  Sweep    Sweep_Location  Dihedral  Twist  Twist_Location  tip airfoil
    1  6     2.55072     1.84928    13.2  3.81818  0               0         0      0.25            NACA 4-series Camber=0 CamberLoc=0.2 ThickChord=0.1
