OpenVSP model (file version 4), 11 components.
Geometry view with OpenVSP parameter names; values to 6 digits, angles in degrees, lengths in the model's unit.
Overall bounding box: X_Min=0 X_Len=45.5253 Y_Min=-22.2521 Y_Len=44.5042 Z_Min=-4.1015 Z_Len=9.9644

Fuselage "FuselageGeom"
  location (X Y Z) 0 0 0, rotation 90 0 0
  bounding box size 43.3417 5.83939 4.66117
  Design: Length=43.3417
  cross sections:
    n   XLocPercent  YLocPercent  ZLocPercent  shape
    0   0            -0.00644273  0            point
    1   0.125        0.000679348  0            ellipse Ellipse_Height=5.83088 Ellipse_Width=4.10229
    2   0.147732     0.00339674   0            ellipse Ellipse_Height=5.71474 Ellipse_Width=4.35765
    3   0.170465     0.00611413   0            ellipse Ellipse_Height=5.83939 Ellipse_Width=4.5037
    4   0.181347     0.00611413   0            ellipse Ellipse_Height=5.62568 Ellipse_Width=4.5037
    5   0.19223      0.00611413   0            ellipse Ellipse_Height=5.53456 Ellipse_Width=4.51011
    6   0.221115     0.00475543   0            ellipse Ellipse_Height=4.96887 Ellipse_Width=4.34594
    7   0.235557     0.00271739   0            ellipse Ellipse_Height=4.49117 Ellipse_Width=4.18141
    8   0.25         0            0            ellipse Ellipse_Height=3.96644 Ellipse_Width=3.9844
    9   0.375        -0.0271739   0            circle Circle_Diameter=1.62949
    10  0.5          -0.0326087   0            circle Circle_Diameter=1.13917
    11  1            -0.033288    0            ellipse Ellipse_Height=0 Ellipse_Width=1.13917

Disk "Disk", child of "FuselageGeom"
  location (X Y Z) 0 0 0, rotation 0 0 0
  bounding box size 0 6 6
  Design: Diameter=6
  custom script Disk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

Wing "upperrudder"
  location (X Y Z) 38.5714 0 -0.952381, rotation 90 0 0
  bounding box size 6.95389 0.555266 6.81528
  totals: TotalSpan=6.81528 TotalProjectedSpan=6.81528 TotalChord=3.46763 TotalArea=23.6329
  root: chord 4.78308, twist 0, NACA 4-series Camber=0 CamberLoc=0.2 ThickChord=0.1
  sections:
    n  Span     Root_Chord  Tip_Chord  Area     Sweep    Sweep_Location  Dihedral  Twist  Twist_Location  tip airfoil
    1  6.81528  4.78308     2.15217    23.6329  35.1667  0               0         0      0.25            as above

Wing "lowerrudder", child of "upperrudder"
  location (X Y Z) 38.75 0 -1.90476, rotation -90 0 0
  bounding box size 4.57936 0.468769 2.19674
  totals: TotalSpan=2.19674 TotalProjectedSpan=2.19674 TotalChord=3.40593 TotalArea=7.48193
  root: chord 4.03799, twist 0, NACA 4-series Camber=0 CamberLoc=0.2 ThickChord=0.1
  sections:
    n  Span     Root_Chord  Tip_Chord  Area     Sweep    Sweep_Location  Dihedral  Twist  Twist_Location  tip airfoil
    1  2.19674  4.03799     2.77387    7.48193  39.4167  0               0         0      0.25            as above

Wing "Elevator"
  location (X Y Z) 39.122 0.0595238 -1.42857, rotation 0 0 0
  symmetric about XZ
  bounding box size 3.87079 16.293 0.449359
  totals: TotalSpan=16.1739 TotalProjectedSpan=16.1739 TotalChord=3.49717 TotalArea=56.5631
  root: chord 3.87079, twist 0, NACA 4-series Camber=0 CamberLoc=0.2 ThickChord=0.1
  sections:
    n  Span     Root_Chord  Tip_Chord  Area     Sweep  Sweep_Location  Dihedral  Twist  Twist_Location  tip airfoil
    1  8.08697  3.87079     3.12356    28.2815  3.625  0               0         0      0.25            as above

Wing "mainwing", child of "Elevator"
  location (X Y Z) 6.04167 1.19048 -0.714286, rotation 0 0 0
  symmetric about XZ
  bounding box size 3.95652 44.5042 0.459311
  totals: TotalSpan=42.1232 TotalProjectedSpan=42.1232 TotalChord=3.11413 TotalArea=131.177
  root: chord 3.95652, twist 0, NACA 4-series Camber=0 CamberLoc=0.2 ThickChord=0.1
  sections:
    n  Span     Root_Chord  Tip_Chord  Area     Sweep  Sweep_Location  Dihedral  Twist  Twist_Location  tip airfoil
    1  21.0616  3.95652     2.27174    65.5886  3.625  0               0         0      0.25            as above

Mesh "MeshGeom"
  location (X Y Z) 0 0 0, rotation 0 0 0

Mesh "MeshGeom"
  location (X Y Z) 0 0 0, rotation 0 0 0

Mesh "MeshGeom"
  location (X Y Z) 0 0 0, rotation 0 0 0

Mesh "MeshGeom"
  location (X Y Z) 0 0 0, rotation 0 0 0

PodMan "PodMan"
  location (X Y Z) 8.33333 -1.13095 2.14286, rotation -180 63.4952 -180
  symmetric about XZ
  bounding box size 3.95752 4.38762 3.94753
  Design: ElbowAngle=45 Height=6 HipAngle=90 KneeAngle=-80.2708 PresetTrigger=0 Presets=4 ShoulderAngle=45
  custom script PodMan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
