OpenVSP model (file version 4), 3 components.
Geometry view with OpenVSP parameter names; values to 6 digits, angles in degrees, lengths in the model's unit.
Overall bounding box: X_Min=0 X_Len=30 Y_Min=-1.35208 Y_Len=2.70416 Z_Min=-1.5 Z_Len=3

Fuselage "FuselageGeom"
  location (X Y Z) 0 0 0, rotation 0 0 0
  bounding box size 30 2.70416 3
  Design: Length=30
  cross sections:
    n  XLocPercent  YLocPercent  ZLocPercent  shape
    0  0            0            0            point
    1  0.25         0            0            ellipse Ellipse_Height=3 Ellipse_Width=2.5
    2  0.5          0            0            as above
    3  0.75         0            0            as above
    4  1            0            0            point

Pod "Original_Pod", child of "FuselageGeom"
  location (X Y Z) 3 1 0, rotation 0 0 0; relative location 0 0 0, rotation 0 0 0
  symmetric about XZ
  bounding box size 10 1.33333 1.33333
  Design: FineRatio=10 Length=7

Pod "Pod", child of "FuselageGeom"
  location (X Y Z) 0 0 1, rotation 0 0 0; relative location 0 0 0, rotation 0 0 0
  bounding box size 7 1.4 1.4
  Design: FineRatio=10 Length=7
