OpenVSP model (file version 4), 1 components.
Geometry view with OpenVSP parameter names; values to 6 digits, angles in degrees, lengths in the model's unit.
Overall bounding box: X_Min=-0.00416271 X_Len=12.0202 Y_Min=-10.0894 Y_Len=20.1788 Z_Min=-0.215972 Z_Len=1.70955

Wing "WingGeom"
  location (X Y Z) 0 0 0, rotation 0 0 0
  symmetric about XZ
  bounding box size 12.0202 20.1788 1.70955
  totals: TotalSpan=22 TotalProjectedSpan=20.0793 TotalChord=3 TotalArea=98
  root: chord 7, twist 0, NACA 4-series Camber=0.02 CamberLoc=0.2 ThickChord=0.1
  sections:
    n  Span  Root_Chord  Tip_Chord  Area  Sweep  Sweep_Location  Dihedral  Twist  Twist_Location  tip airfoil
    1  9     7           3          45    40     0               0         0      0.25            NACA 4-series Camber=0 CamberLoc=0.2 ThickChord=0.1
    2  1     3           2          2.5   60     0               30        0      0.25            as above
    3  1     2           1          1.5   60     0               80        0      0.25            as above
