OpenVSP model (file version 4), 1 components.
Geometry view with OpenVSP parameter names; values to 6 digits, angles in degrees, lengths in the model's unit.
Overall bounding box: X_Min=0 X_Len=30 Y_Min=-1.52109 Y_Len=3.2957 Z_Min=-1.5 Z_Len=3

Fuselage "FuselageGeom"
  location (X Y Z) 0 0 0, rotation 0 0 0
  bounding box size 5394.27 5603.07 2321.69
  Design: Length=30
  cross sections:
    n  XLocPercent  YLocPercent  ZLocPercent  shape
    0  0            0            0            file fuselage section Height=4 Width=2
    1  0.25         0            0            super ellipse Super_Height=2 Super_M=2 Super_MaxWidthLoc=0 Super_N=2 Super_Width=4
    2  0.5          0            0            as above
    3  0.75         0            0            as above
    4  1            0            0            point
