OpenVSP model (file version 4), 1 components.
Geometry view with OpenVSP parameter names; values to 6 digits, angles in degrees, lengths in the model's unit.
Overall bounding box: X_Min=0 X_Len=6.19615 Y_Min=-9 Y_Len=18 Z_Min=-0.769826 Z_Len=1.38459

Wing "WingGeom"
  location (X Y Z) 0 0 0, rotation 0 0 0
  symmetric about XZ
  bounding box size 6.19615 18 1.38459
  totals: TotalSpan=18 TotalProjectedSpan=18 TotalChord=2.5 TotalArea=45
  root: chord 4, twist 0, CST airfoil ContLERad=0 LowDegree=7 ThickChord=0.1 UpDegree=7 Au=[0.5 0.5 0.1 0.5 0.5 0.5 0.5 0.5] Al=[-0.5 -0.5 -0.5 -0.5 -0.5 -0.5 -0.5 -0.5]
  sections:
    n  Span  Root_Chord  Tip_Chord  Area  Sweep  Sweep_Location  Dihedral  Twist  Twist_Location  tip airfoil
    1  9     4           1          22.5  30     0               0         0      0.25            NACA 4-series Camber=0 CamberLoc=0.2 ThickChord=0.1
